*HEADING
Kryova -- written by Kryova. Units: mm, N, MPa, tonne.
*NODE, NSET=NALL
1, -10.0, -5.0, 0.0
2, -10.0, -5.0, 200.0
3, 10.0, -5.0, 0.0
4, 10.0, -5.0, 200.0
5, 10.0, 5.0, 0.0
6, 10.0, 5.0, 200.0
7, -10.0, 5.0, 0.0
8, -10.0, 5.0, 200.0
9, -10.0, -5.0, 10.000000000000028
10, -10.0, -5.0, 20.000000000000043
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*ELEMENT, TYPE=C3D4, ELSET=EALL
1, 63, 43, 137, 129
2, 23, 83, 95, 171
3, 19, 79, 140, 166
4, 39, 98, 59, 125
5, 166, 140, 19, 98
6, 59, 98, 140, 125
7, 43, 129, 95, 137
8, 95, 171, 83, 137
9, 99, 129, 62, 137
10, 128, 105, 147, 96
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*NSET, NSET=FIX1
1, 3, 5, 7, 28, 68, 173, 174
*MATERIAL, NAME=STEEL_1018
*ELASTIC, TYPE=ISO
205000.0, 0.29
*DENSITY
7.87e-09
*EXPANSION
1.17e-05
*SOLID SECTION, ELSET=EALL, MATERIAL=STEEL_1018
*STEP
*STATIC
*BOUNDARY
FIX1, 1, 1, 0.0
FIX1, 2, 2, 0.0
FIX1, 3, 3, 0.0
*CLOAD
2, 2, -16.66666666666667
4, 2, -16.666666666666654
6, 2, -16.666666666666664
8, 2, -16.666666666666686
48, 2, -24.999999999999982
88, 2, -25.00000000000002
175, 2, -41.66666666666668
176, 2, -41.666666666666664
*NODE FILE
U
*EL FILE
S
*END STEP
